OpenVSP model (file version 5), 4 components.
Geometry view with OpenVSP parameter names; values to 6 digits, angles in degrees, lengths in the model's unit.
Overall bounding box: X_Min=0 X_Len=64.5454 Y_Min=-30.2832 Y_Len=60.5664 Z_Min=-3.44543 Z_Len=16.7444

Fuselage "fuselage"
  location (X Y Z) 0 0 0, rotation 0 0 0
  bounding box size 63.73 6.33565 6.24795
  Design: Length=63.73
  cross sections:
    n  XLocPercent  YLocPercent  ZLocPercent  shape
    0  0            0            0            general fuselage BotStr=0.83 BotTanAngle=90 CornerRad=0 Height=0.025 LowStr=0.83 MaxWidthLoc=0 TopStr=0.83 TopTanAngle=90 UpStr=0.83 Width=0
    1  0.0173466    0            0.00117095   ellipse Ellipse_Height=1.99119 Ellipse_Width=2
    2  0.156912     0            0.0147758    general fuselage BotStr=0.83 BotTanAngle=90 CornerRad=0 Height=6.2 LowStr=0.83 MaxWidthLoc=0 TopStr=0.83 TopTanAngle=90 UpStr=0.83 Width=6.2
    3  0.642051     0            0.0147758    as above
    4  0.730978     0            0.0164431    general fuselage BotStr=0.83 BotTanAngle=90 CornerRad=0 Height=6.08327 LowStr=0.83 MaxWidthLoc=0 TopStr=0.83 TopTanAngle=90 UpStr=0.83 Width=6.2
    5  0.99         0            0.0467919    general fuselage BotStr=0.83 BotTanAngle=90 CornerRad=0 Height=2.08866 LowStr=0.83 MaxWidthLoc=0 TopStr=0.83 TopTanAngle=90 UpStr=0.83 Width=1.45
    6  1            0            0.0467919    point

Wing "wing"
  location (X Y Z) 21.58 0 -0.77, rotation 0 9.5082 0
  symmetric about XZ
  bounding box size 23.5483 60.5664 3.1927
  totals: TotalSpan=60.9 TotalProjectedSpan=60.5664 TotalChord=8.13219 TotalArea=427.8 TotalAR=8.57477
  root: chord 15.0006, twist 0, airfoil file "SC_02_0714"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 BaseThickChord=0.138253 ThickChord=0.138253
  sections:
    n  Span     Root_Chord  Tip_Chord  Area     Sweep    Sweep_Location  Dihedral  Twist  Twist_Location  tip airfoil
    1  9.73679  15.0006     7.40882    109.098  32.7143  0.18            6         0      0.25            as above
    2  20.7132  7.40882     2.71054    104.802  32.1429  0               6         0      0.25            airfoil file "SC_02_0712"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 BaseThickChord=0.118714 ThickChord=0.118714
  SS_Control "flap_1": EtaStart=0.107843 EtaEnd=0.318627 Length_C_Start=0.25 Length_C_End=0.25 Length_Start=3.11034 Length_End=1.85912 LE_Flag=0 Surf_Type=2
  SS_Control "flap_2": EtaStart=0.3209 EtaEnd=0.72549 Length_C_Start=0.25 Length_C_End=0.25 Length_Start=1.85041 Length_End=1.15173 LE_Flag=0 Surf_Type=2
  SS_Control "aileron": EtaStart=0.727905 EtaEnd=0.982314 Length_C_Start=0.25 Length_C_End=0.25 Length_Start=1.14756 Length_End=0.70823 LE_Flag=0 Surf_Type=2

Wing "horizontal"
  location (X Y Z) 53.311 0 2.1, rotation 0 -3.443 0
  symmetric about XZ
  bounding box size 11.2347 21.233 2.13398
  totals: TotalSpan=21.35 TotalProjectedSpan=21.233 TotalChord=4.7429 TotalArea=101.261 TotalAR=4.45228
  root: chord 7.11435, twist 0, NACA 4-series Camber=0 CamberLoc=0.2 ThickChord=0.1
  sections:
    n  Span    Root_Chord  Tip_Chord  Area     Sweep  Sweep_Location  Dihedral  Twist  Twist_Location  tip airfoil
    1  10.675  7.11435     2.37145    50.6305  40     0               6         -2.7   0.25            as above

Wing "vertical"
  location (X Y Z) 50.9838 0 4.112, rotation 90 0 -0.328
  bounding box size 11.597 0.922271 9.23972
  totals: TotalSpan=9.24 TotalProjectedSpan=9.24 TotalChord=5.76085 TotalArea=53.2303 TotalAR=1.60393
  root: chord 9.21736, twist 0, NACA 4-series Camber=0 CamberLoc=0.2 ThickChord=0.1
  sections:
    n  Span  Root_Chord  Tip_Chord  Area     Sweep  Sweep_Location  Dihedral  Twist  Twist_Location  tip airfoil
    1  9.24  9.21736     2.30434    53.2303  45     0               0         0      0.25            as above

VSPAERO settings: Sref=427.8 bref=60.9 cref=8.13219 Xcg=32.303 Ycg=0 Zcg=1.076 AlphaStart=0 AlphaEnd=10 AlphaNpts=3 BetaStart=0 BetaEnd=0 BetaNpts=1 MachStart=0 MachEnd=0 MachNpts=1 ReCref=1e+07 Vinf=100 Rho=0.002377
  control group "FLAPS": DeflectionAngle=0
  control group "AILERON": DeflectionAngle=0
