OpenVSP model (file version 5), 4 components.
Geometry view with OpenVSP parameter names; values to 6 digits, angles in degrees, lengths in the model's unit.
Overall bounding box: X_Min=0 X_Len=15.75 Y_Min=-9.6564 Y_Len=19.3128 Z_Min=-0.67995 Z_Len=4.85934

Fuselage "fuselage"
  location (X Y Z) 0 0 0, rotation 0 0 0
  bounding box size 14.7338 2.0154 1.75455
  mass: Density=1 Shell_Flag=0 Mass_Area=1 Mass_Prior=0 PointMass=1047.46 CGx=0 CGy=0 CGz=0 Ixx=0 Iyy=0 Izz=0 Ixy=0 Ixz=0 Iyz=0
  Design: Length=14.63
  cross sections:
    n   XLocPercent  YLocPercent  ZLocPercent   shape
    0   0            0            -0.00340396   point
    1   0.00173616   0            -0.00295284   ellipse Ellipse_Height=0.1319 Ellipse_Width=0.1429
    2   0.00233766   0            -0.00280246   ellipse Ellipse_Height=0.1511 Ellipse_Width=0.1638
    3   0.00656869   0            -0.00206425   ellipse Ellipse_Height=0.2399 Ellipse_Width=0.2585
    4   0.0186398    0            -0.000574163  ellipse Ellipse_Height=0.4291 Ellipse_Width=0.4626
    5   0.0337389    0            0.00050581    ellipse Ellipse_Height=0.5987 Ellipse_Width=0.6779
    6   0.0488312    0            0.00295967    ellipse Ellipse_Height=0.7889 Ellipse_Width=0.8637
    7   0.0639234    0            0.00615858    ellipse Ellipse_Height=0.9867 Ellipse_Width=0.9995
    8   0.0790226    0            0.00793575    ellipse Ellipse_Height=1.1241 Ellipse_Width=1.1279
    9   0.0941148    0            0.00896104    ellipse Ellipse_Height=1.2268 Ellipse_Width=1.2513
    10  0.109207     0            0.00974026    ellipse Ellipse_Height=1.3133 Ellipse_Width=1.3666
    11  0.139398     0            0.0110048     ellipse Ellipse_Height=1.457 Ellipse_Width=1.5668
    12  0.169583     0            0.0119412     ellipse Ellipse_Height=1.5668 Ellipse_Width=1.7272
    13  0.199774     0            0.0126179     ellipse Ellipse_Height=1.6486 Ellipse_Width=1.8494
    14  0.229959     0            0.0130827     ellipse Ellipse_Height=1.7068 Ellipse_Width=1.9376
    15  0.260144     0            0.0133493     ellipse Ellipse_Height=1.7429 Ellipse_Width=1.9948
    16  0.286787     0            0.013445      ellipse Ellipse_Height=1.7533 Ellipse_Width=2.0104
    17  0.344142     0            0.0134586     as above
    18  0.401497     0            0.0134723     as above
    19  0.458852     0            0.0134928     as above
    20  0.516213     0            0.0165003     ellipse Ellipse_Height=1.6656 Ellipse_Width=2.0104
    21  0.573568     0            0.0165208     as above
    22  0.59879      0            0.0165277     as above
    23  0.614395     0            0.0165687     ellipse Ellipse_Height=1.6642 Ellipse_Width=2.0105
    24  0.630021     0            0.0167806     ellipse Ellipse_Height=1.6563 Ellipse_Width=2.0108
    25  0.645619     0            0.017136      ellipse Ellipse_Height=1.6433 Ellipse_Width=2.0114
    26  0.661217     0            0.0176213     ellipse Ellipse_Height=1.6252 Ellipse_Width=2.0123
    27  0.676849     0            0.0182297     ellipse Ellipse_Height=1.6025 Ellipse_Width=2.0133
    28  0.692447     0            0.0188927     ellipse Ellipse_Height=1.5747 Ellipse_Width=2.0126
    29  0.708072     0            0.0196241     ellipse Ellipse_Height=1.5422 Ellipse_Width=2.0005
    30  0.723677     0            0.0203964     ellipse Ellipse_Height=1.4597 Ellipse_Width=1.9272
    31  0.740766     0            0.0212987     as above
    32  0.760608     0            0.0222693     ellipse Ellipse_Height=1.4105 Ellipse_Width=1.8558
    33  0.787799     0            0.0240191     ellipse Ellipse_Height=1.3182 Ellipse_Width=1.6961
    34  0.801729     0            0.0249692     ellipse Ellipse_Height=1.2655 Ellipse_Width=1.6152
    35  0.819084     0            0.0260629     ellipse Ellipse_Height=1.2017 Ellipse_Width=1.498
    36  0.829795     0            0.0267464     ellipse Ellipse_Height=1.161 Ellipse_Width=1.4225
    37  0.842994     0            0.0275871     ellipse Ellipse_Height=1.1093 Ellipse_Width=1.3217
    38  0.854703     0            0.028339      ellipse Ellipse_Height=1.0621 Ellipse_Width=1.2246
    39  0.866411     0            0.0290841     ellipse Ellipse_Height=1.014 Ellipse_Width=1.1422
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
Wing "wing"
  location (X Y Z) 5.09 0 1, rotation 0 0 0
  symmetric about XZ
  bounding box size 2.36021 19.3128 0.676452
  mass: Density=1 Shell_Flag=0 Mass_Area=1 Mass_Prior=0 PointMass=490 CGx=0 CGy=0 CGz=0 Ixx=0 Iyy=0 Izz=0 Ixy=0 Ixz=0 Iyz=0
  totals: TotalSpan=18.97 TotalProjectedSpan=18.9584 TotalChord=2.17375 TotalArea=40.1627 TotalAR=8.94917
  root: chord 2.35, twist 0, NACA 5-digit CamberLoc=0.15 IdealCl=0.6 ThickChord=0.18
  sections:
    n  Span   Root_Chord  Tip_Chord  Area     Sweep  Sweep_Location  Dihedral  Twist  Twist_Location  tip airfoil
    1  3.22   2.35        2.35       7.567    0      0               2         0      0.25            as above
    2  6.265  2.35        1.645      12.5143  0      0               2         0      0.25            as above
  SS_Control "flap_1": EtaStart=0.125 EtaEnd=0.342 Length_C_Start=0.377 Length_C_End=0.377 Length_Start=0.88595 Length_End=0.884937 LE_Flag=0 Surf_Type=2
  SS_Control "flap_2": EtaStart=0.352 EtaEnd=0.7 Length_C_Start=0.377 Length_C_End=0.377 Length_Start=0.880913 Length_End=0.740882 LE_Flag=0 Surf_Type=2
  SS_Control "aileron": EtaStart=0.71 EtaEnd=0.95 Length_C_Start=0.35 Length_C_End=0.35 Length_Start=0.684086 Length_End=0.594429 LE_Flag=0 Surf_Type=2

Wing "horizontal"
  location (X Y Z) 14.4 0 3.8, rotation 0 0 0
  symmetric about XZ
  bounding box size 1.35 5.63981 0.121575
  mass: Density=1 Shell_Flag=0 Mass_Area=1 Mass_Prior=0 PointMass=35.28 CGx=0 CGy=0 CGz=0 Ixx=0 Iyy=0 Izz=0 Ixy=0 Ixz=0 Iyz=0
  totals: TotalSpan=5.5 TotalProjectedSpan=5.5 TotalChord=1.35 TotalArea=7.425 TotalAR=4.07407
  root: chord 1.35, twist 0, NACA 4-series Camber=0 CamberLoc=0.2 ThickChord=0.09
  sections:
    n  Span  Root_Chord  Tip_Chord  Area    Sweep  Sweep_Location  Dihedral  Twist  Twist_Location  tip airfoil
    1  2.75  1.35        1.35       3.7125  0      0               0         0      0.25            as above
  SS_Control "elevator": EtaStart=0.05 EtaEnd=1 Length_C_Start=0.375 Length_C_End=0.375 Length_Start=0.50625 Length_End=0.50625 LE_Flag=0 Surf_Type=2

Wing "vertical"
  location (X Y Z) 11.9 0 0.5, rotation 90 0 0
  bounding box size 3.83574 0.238648 3.67939
  mass: Density=1 Shell_Flag=0 Mass_Area=1 Mass_Prior=0 PointMass=33.45 CGx=0 CGy=0 CGz=0 Ixx=0 Iyy=0 Izz=0 Ixy=0 Ixz=0 Iyz=0
  totals: TotalSpan=3.55 TotalProjectedSpan=3.55 TotalChord=2 TotalArea=7.1 TotalAR=1.775
  root: chord 2.65, twist 0, NACA 4-series Camber=0 CamberLoc=0.2 ThickChord=0.09
  sections:
    n  Span  Root_Chord  Tip_Chord  Area  Sweep  Sweep_Location  Dihedral  Twist  Twist_Location  tip airfoil
    1  3.55  2.65        1.35       7.1   35     0               0         0      0.25            as above
  SS_Control "rudder": EtaStart=0.1 EtaEnd=0.9 Length_C_Start=0.375 Length_C_End=0.375 Length_Start=0.945 Length_End=0.555 LE_Flag=0 Surf_Type=2

VSPAERO settings: Sref=40 bref=18.97 cref=2.15 Xcg=5.6 Ycg=0 Zcg=0.62 AlphaStart=-5 AlphaEnd=20 AlphaNpts=15 BetaStart=0 BetaEnd=0 BetaNpts=1 MachStart=0.33 MachEnd=0.33 MachNpts=1 ReCref=1.42e+07 Vinf=106 Rho=0.89
  control group "FLAP": DeflectionAngle=0
  control group "AILERON": DeflectionAngle=0
  control group "ELEVATOR": DeflectionAngle=0
  control group "RUDDER": DeflectionAngle=0
