OpenVSP model (file version 5), 6 components.
Geometry view with OpenVSP parameter names; values to 6 digits, angles in degrees, lengths in the model's unit.
Overall bounding box: X_Min=-0.0459369 X_Len=37.3818 Y_Min=-17.9215 Y_Len=35.843 Z_Min=-2.65699 Z_Len=11.003

Wing "wing"
  location (X Y Z) 11.765 0 -0.57, rotation 0 0 0
  symmetric about XZ
  bounding box size 12.122 35.843 4.81408
  totals: TotalSpan=39.7075 TotalProjectedSpan=35.7987 TotalChord=2.4055 TotalArea=126.746 TotalAR=10.1112
  root: chord 7.25, twist 0, airfoil file "SC_02_0714"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 BaseThickChord=0.138253 ThickChord=0.14
  sections:
    n  Span     Root_Chord  Tip_Chord  Area      Sweep  Sweep_Location  Dihedral  Twist  Twist_Location  tip airfoil
    1  6.3933   7.25        3.779      35.2559   28.31  0               6         0      0               as above
    2  10.6427  3.779       1.143      26.1917   28.31  0               6         0      0               airfoil file "SC_02_0712"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 BaseThickChord=0.118714 ThickChord=0.12
    3  0.37267  1.143       0.884      0.377701  55.34  0               24.5      0      0               as above
    4  2.4451   0.884       0.382      1.54775   39.62  0               75.37     0      0               as above
  SS_Control "slat_1": UStart=0.2254 UEnd=0.30788 Length_C_Start=0.11006 Length_C_End=0.11006 Length_Start=0.663375 Length_End=0.474304 LE_Flag=1 Surf_Type=2
  SS_Control "slat_2": UStart=0.33012 UEnd=0.37754 Length_C_Start=0.14 Length_C_End=0.14 Length_Start=0.53848 Length_End=0.431217 LE_Flag=1 Surf_Type=2
  SS_Control "slat_3": UStart=0.37816 UEnd=0.41928 Length_C_Start=0.14 Length_C_End=0.14 Length_Start=0.429844 Length_End=0.338785 LE_Flag=1 Surf_Type=2
  SS_Control "slat_4": UStart=0.41928 UEnd=0.45753 Length_C_Start=0.14 Length_C_End=0.14 Length_Start=0.338785 Length_End=0.254081 LE_Flag=1 Surf_Type=2
  SS_Control "slat_5": UStart=0.45815 UEnd=0.49081 Length_C_Start=0.14 Length_C_End=0.14 Length_Start=0.252709 Length_End=0.180384 LE_Flag=1 Surf_Type=2
  SS_Control "flap_1": UStart=0.21842 UEnd=0.3323 Length_C_Start=0.2 Length_C_End=0.2 Length_Start=1.23455 Length_End=0.760177 LE_Flag=0 Surf_Type=2
  SS_Control "flap_2": UStart=0.33396 UEnd=0.44727 Length_C_Start=0.2 Length_C_End=0.2 Length_Start=0.75389 Length_End=0.395431 LE_Flag=0 Surf_Type=2
  SS_Control "aileron": UStart=0.44883 UEnd=0.49161 Length_C_Start=0.2866 Length_C_End=0.2866 Length_Start=0.559581 Length_End=0.365646 LE_Flag=0 Surf_Type=2

Wing "horizontal"
  location (X Y Z) 31.77 0 1.089, rotation 0 0 0
  symmetric about XZ
  bounding box size 5.25342 12.4676 1.21907
  totals: TotalSpan=12.585 TotalProjectedSpan=12.45 TotalChord=1.9105 TotalArea=32.5213 TotalAR=4.76615
  root: chord 4, twist 0, NACA 4-series Camber=0.09 CamberLoc=0.4 ThickChord=0.12
  sections:
    n  Span     Root_Chord  Tip_Chord  Area      Sweep  Sweep_Location  Dihedral  Twist  Twist_Location  tip airfoil
    1  5.9778   4           1.318      15.895    33.04  0               8.4       0      0               as above
    2  0.31468  1.318       1.006      0.365658  48.8   0               8.4       0      0               as above
  SS_Control "elevator": UStart=0.30002 UEnd=0.75 Length_C_Start=0.28 Length_C_End=0.28 Length_Start=0.969748 Length_End=0.28168 LE_Flag=0 Surf_Type=2

Wing "vertical"
  location (X Y Z) 28.304 0 2.787, rotation 90 0 -2.5
  bounding box size 8.86542 0.888726 5.88187
  totals: TotalSpan=5.87 TotalProjectedSpan=5.87 TotalChord=4.14426 TotalArea=21.5381 TotalAR=1.59981
  root: chord 7.4027, twist 0, NACA 4-series Camber=0 CamberLoc=0.2 ThickChord=0.12
  sections:
    n  Span    Root_Chord  Tip_Chord  Area      Sweep  Sweep_Location  Dihedral  Twist  Twist_Location  tip airfoil
    1  0.469   7.4027      5.404      3.00317   77.37  0               0         0      0               as above
    2  0.734   5.404       4.6682     3.6965    50.56  0               0         0      0               as above
    3  4.2003  4.6682      1.996      13.9958   40.05  0               0         0      0               as above
    4  0.4667  1.996       1.615      0.842627  46.19  0               0         0      0               as above
  SS_Control "rudder_1": UStart=0.41501 UEnd=0.83333 Length_C_Start=0.36721 Length_C_End=0.36721 Length_Start=1.85199 Length_End=0.593049 LE_Flag=0 Surf_Type=2

Stack "fuselage"
  location (X Y Z) 0 0 0, rotation 0 0 0
  bounding box size 37.3818 3.76943 4.14473
  cross sections:
    n   XDelta     YDelta  ZDelta       shape
    0   0          0       0            ellipse Ellipse_Height=0.414926 Ellipse_Width=0.37358
    1   0.0879138  0       -0.00359146  file fuselage section Height=0.614542 Width=0.543581
    2   0.0297889  0       -0.00121694  file fuselage section Height=0.68218 Width=0.601184
    3   0.0889921  0       0.0162438    file fuselage section Height=0.844486 Width=0.77327
    4   0.147076   0       0.0202081    file fuselage section Height=1.05313 Width=0.948605
    5   0.203311   0       0.0232878    file fuselage section Height=1.31524 Width=1.18711
    6   0.256988   0       0.0479488    file fuselage section Height=1.60301 Width=1.45805
    7   0.307434   0       0.0436829    file fuselage section Height=1.91226 Width=1.73979
    8   0.354014   0       0.0665724    file fuselage section Height=2.23581 Width=2.05362
    9   0.396142   0       0.0668357    file fuselage section Height=2.57214 Width=2.35924
    10  0.433288   0       0.0834471    file fuselage section Height=2.90693 Width=2.68518
    11  0.464985   0       0.086074     file fuselage section Height=3.23564 Width=2.98718
    12  0.490835   0       0.0964788    file fuselage section Height=3.55274 Width=3.27982
    13  0.510512   0       0.0950865    file fuselage section Height=3.82228 Width=3.53883
    14  0.52377    0       0.0854127    file fuselage section Height=4.04135 Width=3.70856
    15  0.53044    0       0.0438378    file fuselage section Height=4.141 Width=3.768
    16  5.3819     0       0            as above
    17  10.7638    0       0            as above
    18  5.3819     0       0            as above
    19  0.328052   0       0.00430058   file fuselage section Height=4.13214 Width=3.75768
    20  0.944588   0       0.025097     file fuselage section Height=4.08063 Width=3.70163
    21  1.44719    0       0.0823218    file fuselage section Height=3.90453 Width=3.50171
    22  1.77525    0       0.145802     file fuselage section Height=3.56793 Width=3.11919
    23  1.88918    0       0.186051     file fuselage section Height=3.08777 Width=2.58468
    24  1.77525    0       0.190391     file fuselage section Height=2.50475 Width=1.96608
    25  1.44719    0       0.158518     file fuselage section Height=1.86945 Width=1.34878
    26  0.944588   0       0.0943963    file fuselage section Height=1.25888 Width=0.816126
    27  0.328052   0       0.0419504    file fuselage section Height=0.859197 Width=0.527879

Stack "nacelle_1"
  location (X Y Z) 13.006 5.75 -1.283, rotation 0 0 0
  bounding box size 2.834 2.73528 2.73532
  cross sections:
    n   XDelta      YDelta  ZDelta        shape
    0   0           0       0             circle Circle_Diameter=2.22167
    1   0.00606782  0       0             circle Circle_Diameter=2.2266
    2   0.0181775   0       0             circle Circle_Diameter=2.24138
    3   0.0302093   0       0             circle Circle_Diameter=2.26589
    4   0.0421118   0       0             circle Circle_Diameter=2.29989
    5   0.0538339   0       0             circle Circle_Diameter=2.34288
    6   0.0653255   0       0             circle Circle_Diameter=2.39392
    7   0.0765374   0       0             circle Circle_Diameter=2.4515
    8   0.0874215   0       0             circle Circle_Diameter=2.51332
    9   0.146433    0       -3.40169e-05  circle Circle_Diameter=2.60413
    10  0.146433    0       0.000127467   circle Circle_Diameter=2.67392
    11  0.146433    0       -0.00287957   circle Circle_Diameter=2.7176
    12  0.146433    0       -0.00343889   circle Circle_Diameter=2.73501
    13  0.143356    0       -0.00332673   circle Circle_Diameter=2.72844
    14  0.150744    0       -0.00349816   circle Circle_Diameter=2.69833
    15  0.157486    0       -0.00365462   circle Circle_Diameter=2.64368
    16  0.163554    0       -0.00379543   circle Circle_Diameter=2.56433
    17  0.168922    0       -0.00391999   circle Circle_Diameter=2.46102
    18  0.173566    0       -0.00402776   circle Circle_Diameter=2.33531
    19  0.177467    0       -0.00411829   circle Circle_Diameter=2.18954
    20  0.180608    0       -0.00419117   circle Circle_Diameter=2.0268
    21  0.182975    0       -0.00424611   circle Circle_Diameter=1.85076
    22  0.184559    0       -0.00428287   circle Circle_Diameter=1.66558
    23  0.185353    0       -0.00430129   circle Circle_Diameter=1.47575

Stack "nacelle_2"
  location (X Y Z) 13.006 -5.75 -1.283, rotation 0 0 0
  bounding box size 2.834 2.73528 2.73532
  cross sections:
    n   XDelta      YDelta  ZDelta        shape
    0   0           0       0             circle Circle_Diameter=2.22167
    1   0.00606782  0       0             circle Circle_Diameter=2.2266
    2   0.0181775   0       0             circle Circle_Diameter=2.24138
    3   0.0302093   0       0             circle Circle_Diameter=2.26589
    4   0.0421118   0       0             circle Circle_Diameter=2.29989
    5   0.0538339   0       0             circle Circle_Diameter=2.34288
    6   0.0653255   0       0             circle Circle_Diameter=2.39392
    7   0.0765374   0       0             circle Circle_Diameter=2.4515
    8   0.0874215   0       0             circle Circle_Diameter=2.51332
    9   0.146433    0       -3.40169e-05  circle Circle_Diameter=2.60413
    10  0.146433    0       0.000127467   circle Circle_Diameter=2.67392
    11  0.146433    0       -0.00287957   circle Circle_Diameter=2.7176
    12  0.146433    0       -0.00343889   circle Circle_Diameter=2.73501
    13  0.143356    0       -0.00332673   circle Circle_Diameter=2.72844
    14  0.150744    0       -0.00349816   circle Circle_Diameter=2.69833
    15  0.157486    0       -0.00365462   circle Circle_Diameter=2.64368
    16  0.163554    0       -0.00379543   circle Circle_Diameter=2.56433
    17  0.168922    0       -0.00391999   circle Circle_Diameter=2.46102
    18  0.173566    0       -0.00402776   circle Circle_Diameter=2.33531
    19  0.177467    0       -0.00411829   circle Circle_Diameter=2.18954
    20  0.180608    0       -0.00419117   circle Circle_Diameter=2.0268
    21  0.182975    0       -0.00424611   circle Circle_Diameter=1.85076
    22  0.184559    0       -0.00428287   circle Circle_Diameter=1.66558
    23  0.185353    0       -0.00430129   circle Circle_Diameter=1.47575

VSPAERO settings: Sref=126.746 bref=39.7074 cref=4.3058 Xcg=15.7798 Ycg=0 Zcg=0 AlphaStart=0 AlphaEnd=0 AlphaNpts=1 BetaStart=0 BetaEnd=5 BetaNpts=2 MachStart=0.3 MachEnd=0 MachNpts=1 ReCref=2.88773e+07 Vinf=100 Rho=0.002377
  control group "SLAT": DeflectionAngle=10
  control group "FLAP": DeflectionAngle=20
  control group "AILERON": DeflectionAngle=0
  control group "ELEVATOR": DeflectionAngle=-25
  control group "RUDDER": DeflectionAngle=10
