OpenVSP model (file version 5), 3 components.
Geometry view with OpenVSP parameter names; values to 6 digits, angles in degrees, lengths in the model's unit.
Overall bounding box: X_Min=0 X_Len=11.7754 Y_Min=-12.3897 Y_Len=24.7793 Z_Min=-0.605162 Z_Len=3.90041

Wing "wing"
  location (X Y Z) 4.78 0.819672 0, rotation 0 0 0
  symmetric about XZ
  bounding box size 4.80618 24.7793 0.374269
  totals: TotalSpan=23.14 TotalProjectedSpan=23.14 TotalChord=1.3365 TotalArea=29.8129 TotalAR=17.9607
  root: chord 2.079, twist 0, airfoil file "SC(2)-0518"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 BaseThickChord=0.179809 ThickChord=0.179809
  sections:
    n  Span  Root_Chord  Tip_Chord  Area     Sweep  Sweep_Location  Dihedral  Twist  Twist_Location  tip airfoil
    1  4.66  2.079       1.089      7.38144  19     0               0         0      0               as above
    2  6.91  1.089       1.089      7.52499  17     0               0         0      0               airfoil file "SC(2)-0512"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 BaseThickChord=0.11999 ThickChord=0.11999
  SS_Control "flap_1": EtaStart=0.0196078 EtaEnd=0.38 Length_C_Start=0.3 Length_C_End=0.3 Length_Start=0.609247 Length_End=0.343491 LE_Flag=0 Surf_Type=2
  SS_Control "aileron": EtaStart=0.41 EtaEnd=0.95 Length_C_Start=0.3 Length_C_End=0.3 Length_Start=0.326703 Length_End=0.326703 LE_Flag=0 Surf_Type=2

Wing "horizontal"
  location (X Y Z) 9.6 0.82 0, rotation 0 0 0
  symmetric about XZ
  bounding box size 2.1754 9.40769 3.36788
  totals: TotalSpan=10.14 TotalProjectedSpan=7.76769 TotalChord=0.9075 TotalArea=9.20205 TotalAR=6.55691
  root: chord 1.21, twist 0, NACA 4-series Camber=0 CamberLoc=0.2 ThickChord=0.12
  sections:
    n  Span  Root_Chord  Tip_Chord  Area     Sweep  Sweep_Location  Dihedral  Twist  Twist_Location  tip airfoil
    1  5.07  1.21        0.605      4.60102  17.21  0               40        0      0.25            as above
  SS_Control "elevator": EtaStart=0.05 EtaEnd=0.9 Length_C_Start=0.4 Length_C_End=0.4 Length_Start=0.4719 Length_End=0.2662 LE_Flag=0 Surf_Type=2

Fuselage "fuselage"
  location (X Y Z) 0 0 0, rotation 0 0 0
  bounding box size 11.46 2.62794 1.72176
  Design: Length=11.46
  cross sections:
    n   XLocPercent  YLocPercent  ZLocPercent  shape
    0   0            0            0            point
    1   0.0931098    0            0.017452     general fuselage BotStr=0.83 BotTanAngle=90 CornerRad=0 Height=1.16735 LowStr=0.83 MaxWidthLoc=0 TopStr=0.83 TopTanAngle=90 UpStr=0.83 Width=1.99851
    2   0.164629     0            0.021815     general fuselage BotStr=0.83 BotTanAngle=90 CornerRad=0 Height=1.44847 LowStr=0.83 MaxWidthLoc=0 TopStr=0.83 TopTanAngle=90 UpStr=0.83 Width=2.4905
    3   0.277487     0            0.021815     general fuselage BotStr=0.83 BotTanAngle=90 CornerRad=0 Height=1.44878 LowStr=0.83 MaxWidthLoc=0 TopStr=0.83 TopTanAngle=90 UpStr=0.83 Width=2.034
    4   0.332984     0            0            general fuselage BotStr=0.83 BotTanAngle=90 CornerRad=0 Height=0.73 LowStr=0.83 MaxWidthLoc=0 TopStr=0.83 TopTanAngle=90 UpStr=0.83 Width=1.734
    5   0.388482     0            0            as above
    6   0.443979     0            0            as above
    7   0.499476     0            0            as above
    8   0.554974     0            0            as above
    9   0.610471     0            0            as above
    10  0.665969     0            0            as above
    11  0.721466     0            0            as above
    12  0.776963     0            0.00819672   general fuselage BotStr=0.83 BotTanAngle=90 CornerRad=0 Height=1.00867 LowStr=0.83 MaxWidthLoc=0 TopStr=0.83 TopTanAngle=90 UpStr=0.83 Width=1.734
    13  0.846335     0            0.013089     general fuselage BotStr=0.83 BotTanAngle=90 CornerRad=0 Height=1.15 LowStr=0.83 MaxWidthLoc=0 TopStr=0.83 TopTanAngle=90 UpStr=0.83 Width=1.734
    14  0.906797     0            0.013089     general fuselage BotStr=0.83 BotTanAngle=90 CornerRad=0 Height=0.976531 LowStr=0.83 MaxWidthLoc=0 TopStr=0.83 TopTanAngle=90 UpStr=0.83 Width=1.734
    15  0.944035     0            0.00819634   general fuselage BotStr=0.83 BotTanAngle=90 CornerRad=0 Height=0.73 LowStr=0.83 MaxWidthLoc=0 TopStr=0.83 TopTanAngle=90 UpStr=0.83 Width=1.734
    16  1            0            0            point

VSPAERO settings: Sref=32.9359 bref=20 cref=1.7185 Xcg=6.47608 Ycg=-0.00118292 Zcg=0.0696094 AlphaStart=0 AlphaEnd=10 AlphaNpts=3 BetaStart=0 BetaEnd=0 BetaNpts=1 MachStart=0 MachEnd=0 MachNpts=1 ReCref=1e+07 Vinf=100 Rho=0.002377
