OpenVSP model (file version 5), 4 components.
Geometry view with OpenVSP parameter names; values to 6 digits, angles in degrees, lengths in the model's unit.
Overall bounding box: X_Min=0 X_Len=13 Y_Min=-10 Y_Len=20 Z_Min=-0.670086 Z_Len=3.42981

Wing "wing"
  location (X Y Z) 3.951 0 0, rotation 0 0 0
  symmetric about XZ
  bounding box size 4.05731 20 0.69797
  totals: TotalSpan=20 TotalProjectedSpan=20 TotalChord=1.7185 TotalArea=32.9359 TotalAR=12.1448
  root: chord 3.874, twist 0, airfoil file "NASA"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 BaseThickChord=0.177388 ThickChord=0.18
  sections:
    n  Span   Root_Chord  Tip_Chord  Area     Sweep  Sweep_Location  Dihedral  Twist  Twist_Location  tip airfoil
    1  4.501  3.874       1          10.9689  17     0               0         0      0               as above
    2  5.499  1           1          5.499    17     0               0         0      0               airfoil file "NASA"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 BaseThickChord=0.177388 ThickChord=0.15

Wing "horizontal"
  location (X Y Z) 11.197 0 0, rotation 0 0 0
  symmetric about XZ
  bounding box size 1 7.43163 2.81975
  totals: TotalSpan=9.186 TotalProjectedSpan=7.43163 TotalChord=1 TotalArea=9.186 TotalAR=6.01232
  root: chord 1, twist 0, NACA 4-series Camber=0 CamberLoc=0.2 ThickChord=0.12
  sections:
    n  Span   Root_Chord  Tip_Chord  Area   Sweep  Sweep_Location  Dihedral  Twist  Twist_Location  tip airfoil
    1  4.593  1           1          4.593  0      0               36        0      0.25            as above

Fuselage "FuselageGeom"
  location (X Y Z) 0 0 0, rotation 0 0 0
  bounding box size 13 2.10415 1.66428
  Design: Length=13
  cross sections:
    n   XLocPercent  YLocPercent  ZLocPercent  shape
    0   0            0            0            point
    1   0.0778069    0            0.00204918   general fuselage BotStr=0.83 BotTanAngle=90 CornerRad=0 Height=1.19256 LowStr=0.83 MaxWidthLoc=0 TopStr=0.83 TopTanAngle=90 UpStr=0.83 Width=1.98251
    2   0.117111     0            0.00819672   general fuselage BotStr=0.83 BotTanAngle=90 CornerRad=0 Height=1.39404 LowStr=0.83 MaxWidthLoc=0 TopStr=0.83 TopTanAngle=90 UpStr=0.83 Width=2.04082
    3   0.156027     0            0.0102459    general fuselage BotStr=0.83 BotTanAngle=90 CornerRad=0 Height=1.44392 LowStr=0.83 MaxWidthLoc=0 TopStr=0.83 TopTanAngle=90 UpStr=0.83 Width=2.04061
    4   0.188465     0            0.00819672   general fuselage BotStr=0.83 BotTanAngle=90 CornerRad=0 Height=1.39171 LowStr=0.83 MaxWidthLoc=0 TopStr=0.83 TopTanAngle=90 UpStr=0.83 Width=2.07264
    5   0.214224     0            0.00409836   general fuselage BotStr=0.83 BotTanAngle=90 CornerRad=0 Height=1.29893 LowStr=0.83 MaxWidthLoc=0 TopStr=0.83 TopTanAngle=90 UpStr=0.83 Width=2.07963
    6   0.231663     0            0.00204918   general fuselage BotStr=0.83 BotTanAngle=90 CornerRad=0 Height=1.18967 LowStr=0.83 MaxWidthLoc=0 TopStr=0.83 TopTanAngle=90 UpStr=0.83 Width=2.03207
    7   0.254341     0            0.00204918   general fuselage BotStr=0.83 BotTanAngle=90 CornerRad=0 Height=1.10779 LowStr=0.83 MaxWidthLoc=0 TopStr=0.83 TopTanAngle=90 UpStr=0.83 Width=1.9898
    8   0.319121     0            0            as above
    9   0.375        0            0            as above
    10  0.462145     0            0            as above
    11  0.496897     0            -0.00204918  general fuselage BotStr=0.83 BotTanAngle=90 CornerRad=0 Height=1.15709 LowStr=0.83 MaxWidthLoc=0 TopStr=0.83 TopTanAngle=90 UpStr=0.83 Width=1.9898
    12  0.62521      0            -0.00614754  edit curve Width=1.99792 Height=1.18034 AbsoluteFlag=0 SymType=0 cubic Bezier points (X Y): 0.5 0, 0.5 -0.276667, 0.276667 -0.5, 0 -0.5, -0.276667 -0.5, -0.5 -0.276667, -0.5 0, -0.5 0.276667, -0.286535 0.910007, -0.00986842 0.910007, 0.266798 0.910007, 0.5 0.276667, 0.5 0
    13  0.680525     0            -0.00614754  edit curve Width=1.99792 Height=1.18648 AbsoluteFlag=0 SymType=0 cubic Bezier points (X Y): 0.5 0, 0.5 -0.276667, 0.276667 -0.464386, 0 -0.464386, -0.276667 -0.464386, -0.5 -0.276667, -0.5 0, -0.5 0.276667, -0.286535 0.884073, -0.00986842 0.884073, 0.266798 0.884073, 0.5 0.276667, 0.5 0
    14  0.805675     0            -0.00409836  edit curve Width=2.04915 Height=1.09294 AbsoluteFlag=0 SymType=0 cubic Bezier points (X Y): 0.5 0, 0.5 -0.276667, 0.276667 -0.5, 0 -0.5, -0.276667 -0.5, -0.5 -0.276667, -0.5 0, -0.5 0.276667, -0.286338 0.77501, -0.00967105 0.77501, 0.266996 0.77501, 0.5 0.276667, 0.5 0
    15  0.883685     0            -0.0102459   edit curve Width=1.9898 Height=0.744435 AbsoluteFlag=0 SymType=0 cubic Bezier points (X Y): 0.5 0, 0.5 -0.276667, 0.283246 -0.463969, 0.00657895 -0.463969, -0.270088 -0.463969, -0.5 -0.276667, -0.5 0, -0.5 0.276667, -0.279956 1.06094, -0.00328947 1.06094, 0.273377 1.06094, 0.5 0.276667, 0.5 0
    16  0.926913     0            -0.00614754  edit curve Width=1.88776 Height=0.607374 AbsoluteFlag=0 SymType=0 cubic Bezier points (X Y): 0.5 0, 0.5 -0.276667, 0.276667 -0.5, 0 -0.5, -0.276667 -0.5, -0.5 -0.276667, -0.5 0, -0.5 0.276667, -0.286535 1.04586, -0.00986842 1.04586, 0.266798 1.04586, 0.5 0.276667, 0.5 0
    17  0.960524     0            -0.00409836  edit curve Width=1.78571 Height=0.409852 AbsoluteFlag=0 SymType=0 cubic Bezier points (X Y): 0.5 0, 0.5 -0.276667, 0.276667 -0.5, 0 -0.5, -0.276667 -0.5, -0.5 -0.276667, -0.5 0, -0.5 0.276667, -0.279956 1.08351, -0.00328947 1.08351, 0.273377 1.08351, 0.5 0.276667, 0.5 0
    18  1            0            0.00204918   point

Stack "engine1", child of "FuselageGeom"
  location (X Y Z) 7.13115 0 0.737705, rotation 0 0 0
  bounding box size 5.68421 1.67234 1.46266
  cross sections:
    n  XDelta   YDelta  ZDelta      shape
    0  0        0       0           ellipse Ellipse_Height=0.73742 Ellipse_Width=1.30818
    1  1        0       -0.213816   ellipse Ellipse_Height=0.983965 Ellipse_Width=1.32653
    2  2        0       -0.115132   ellipse Ellipse_Height=0.886297 Ellipse_Width=1.32653
    3  1.52632  0       -0.0986842  ellipse Ellipse_Height=0.664111 Ellipse_Width=1.32653
    4  1.15789  0       -0.148026   ellipse Ellipse_Height=0.249981 Ellipse_Width=0.816343

VSPAERO settings: Sref=32.9359 bref=20 cref=2.1453 Xcg=4.9012 Ycg=0 Zcg=0 AlphaStart=0 AlphaEnd=6 AlphaNpts=3 BetaStart=0 BetaEnd=0 BetaNpts=1 MachStart=0.7 MachEnd=0 MachNpts=1 ReCref=1.60429e+07 Vinf=100 Rho=0.002377
