OpenVSP model (file version 5), 7 components.
Geometry view with OpenVSP parameter names; values to 6 digits, angles in degrees, lengths in the model's unit.
Overall bounding box: X_Min=0 X_Len=9.281 Y_Min=-4.92859 Y_Len=9.85718 Z_Min=-1.115 Z_Len=2.47676

Wing "wing"
  location (X Y Z) 4.482 0 0, rotation 0 5 0
  symmetric about XZ
  bounding box size 1.39074 9.85718 0.339076
  totals: TotalSpan=10 TotalProjectedSpan=9.85718 TotalChord=0.970833 TotalArea=11.1682 TotalAR=8.70003
  root: chord 1.395, twist 0, NACA 5-digit CamberLoc=0.15 IdealCl=0.3 ThickChord=0.18
  sections:
    n  Span    Root_Chord  Tip_Chord  Area      Sweep  Sweep_Location  Dihedral  Twist  Twist_Location  tip airfoil
    1  2.2775  1.395       1.17       2.92089   0      0               0         0      0               as above
    2  2.2775  1.17        0.945      2.40846   0      0               0         0      0               as above
    3  0.445   0.945       0.2        0.254763  62.56  0               32.91     0      0               as above
  SS_Control "flap_1": UStart=0.27 UEnd=0.32 Length_C_Start=0.3 Length_C_End=0.3 Length_Start=0.394875 Length_End=0.378 LE_Flag=0 Surf_Type=2
  SS_Control "flap_2": UStart=0.376 UEnd=0.52 Length_C_Start=0.3 Length_C_End=0.3 Length_Start=0.3591 Length_End=0.3105 LE_Flag=0 Surf_Type=2
  SS_Control "aileron": UStart=0.528 UEnd=0.6 Length_C_Start=0.3 Length_C_End=0.3 Length_Start=0.3078 Length_End=0.2835 LE_Flag=0 Surf_Type=2

Wing "canardWing"
  location (X Y Z) 0.351 0 -0.326, rotation 0 12 0
  symmetric about XZ
  bounding box size 0.730945 4.005 0.475067
  totals: TotalSpan=4.157 TotalProjectedSpan=4.005 TotalChord=0.477167 TotalArea=2.26249 TotalAR=7.08955
  root: chord 0.693, twist 0, NACA 4-series Camber=0 CamberLoc=0.15 ThickChord=0.1
  sections:
    n  Span    Root_Chord  Tip_Chord  Area       Sweep  Sweep_Location  Dihedral  Twist  Twist_Location  tip airfoil
    1  0.928   0.693       0.576      0.588816   0      0               -7.89     0      0               as above
    2  0.928   0.576       0.459      0.48024    0      0               -7.89     0      0               as above
    3  0.2225  0.459       0.1        0.0621888  44.2   0               -42.49    0      0               as above
  SS_Control "flapCanard": UStart=0.325 UEnd=0.6 Length_C_Start=0.2 Length_C_End=0.2 Length_Start=0.123975 Length_End=0.0918 LE_Flag=0 Surf_Type=2

Wing "horizontal"
  location (X Y Z) 8.552 0 1.318, rotation 0 0 0
  symmetric about XZ
  bounding box size 0.729 3.121 0.0875196
  totals: TotalSpan=3.121 TotalProjectedSpan=3.121 TotalChord=0.729 TotalArea=2.27521 TotalAR=4.28121
  root: chord 0.729, twist 0, NACA 4-series Camber=0 CamberLoc=0.2 ThickChord=0.12
  sections:
    n  Span    Root_Chord  Tip_Chord  Area    Sweep  Sweep_Location  Dihedral  Twist  Twist_Location  tip airfoil
    1  1.5605  0.729       0.729      1.1376  0      0               0         0      0.25            as above
  SS_Control "elevator": UStart=0.33333 UEnd=0.66667 Length_C_Start=0.3 Length_C_End=0.3 Length_Start=0.2187 Length_End=0.2187 LE_Flag=0 Surf_Type=2

Wing "vertical"
  location (X Y Z) 7.606 1.669 0, rotation 90 0 0
  symmetric about XZ
  bounding box size 1.33321 3.49431 1.31029
  totals: TotalSpan=2.636 TotalProjectedSpan=2.62058 TotalChord=0.78225 TotalArea=1.82226 TotalAR=3.76864
  root: chord 1.302, twist 0, NACA 4-series Camber=0 CamberLoc=0.2 ThickChord=0.12
  sections:
    n  Span   Root_Chord  Tip_Chord  Area      Sweep  Sweep_Location  Dihedral  Twist  Twist_Location  tip airfoil
    1  0.385  1.302       0.7        0.385385  58.34  0               6.2       0      0               as above
    2  0.933  0.7         0.427      0.525746  16.81  0               6.2       0      0               as above
  SS_Control "rudder_1": UStart=0.29758 UEnd=0.699 Length_C_Start=0.25 Length_C_End=0.25 Length_Start=0.296857 Length_End=0.120673 LE_Flag=0 Surf_Type=2

Custom "TransportFuse"
  location (X Y Z) 0 0 0, rotation 0 0 0
  bounding box size 6.884 1.8 2.015
  Design: AftCenter=0.11611 AftHeight=0.17278 AftMult=0.88722 AftWidth=0.18944 Diameter=1.8 Length=6.884 NoseCenter=-0.28611 NoseMult=1.7344
  custom script TransportFuse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

Pod "boom_1"
  location (X Y Z) 4.945 -1.669 0, rotation 0 0 0
  bounding box size 3.53 0.593776 0.593776
  Design: FineRatio=11.89 Length=3.53

Pod "boom_2"
  location (X Y Z) 4.945 1.669 0, rotation 0 0 0
  bounding box size 3.53 0.593776 0.593776
  Design: FineRatio=11.89 Length=3.53

VSPAERO settings: Sref=11.1682 bref=10 cref=0.970833 Xcg=3.93571 Ycg=4.58878e-06 Zcg=-0.0333234 AlphaStart=0 AlphaEnd=10 AlphaNpts=3 BetaStart=0 BetaEnd=0 BetaNpts=1 MachStart=0 MachEnd=0 MachNpts=1 ReCref=1e+07 Vinf=100 Rho=0.002377
  control group "FLAP": DeflectionAngle=0
  control group "CANARD": DeflectionAngle=0
  control group "AILERON": DeflectionAngle=0
  control group "ELEVATOR": DeflectionAngle=0
  control group "RUDDER": DeflectionAngle=0
