OpenVSP model (file version 5), 9 components.
Geometry view with OpenVSP parameter names; values to 6 digits, angles in degrees, lengths in the model's unit.
Overall bounding box: X_Min=0 X_Len=8.50142 Y_Min=-6.44048 Y_Len=12.881 Z_Min=-0.772 Z_Len=2.19156

Fuselage "fuselage"
  location (X Y Z) 0 0 0, rotation 0 0 0
  bounding box size 7.763 1.22736 1.43277
  Design: Length=7.763
  cross sections:
    n  XLocPercent  YLocPercent  ZLocPercent   shape
    0  0            0            0             point
    1  0.159184     0            -0.000745376  edit curve Width=0.969388 Height=0.841116 AbsoluteFlag=0 SymType=0 cubic Bezier points (X Y): 0.5 0, 0.5 -0.276667, 0.286535 -0.295708, 0.00986842 -0.295708, -0.3125 -0.30329, -0.5 -0.276667, -0.5 0, -0.5 0.276667, -0.276667 0.5, 0 0.5, 0.276667 0.5, 0.5 0.276667, 0.5 0
    2  0.292831     0            0             edit curve Width=1.17347 Height=1.72351 AbsoluteFlag=0 SymType=0 cubic Bezier points (X Y): 0.5 0, 0.5 -0.276667, 0.287986 -0.23891, 0.0113192 -0.23891, -0.265347 -0.23891, -0.5 -0.276667, -0.5 0, -0.5 0.276667, -0.276667 0.462833, 0 0.462833, 0.276667 0.462833, 0.5 0.276667, 0.5 0
    3  0.404159     0            0.002         edit curve Width=1.22449 Height=1.91651 AbsoluteFlag=0 SymType=0 cubic Bezier points (X Y): 0.5 0, 0.5 -0.276667, 0.276667 -0.228319, 0 -0.228319, -0.276667 -0.228319, -0.5 -0.276667, -0.5 0, -0.5 0.276667, -0.276667 0.5, 0 0.5, 0.276667 0.5, 0.5 0.276667, 0.5 0
    4  0.538764     0            0.004         edit curve Width=0.991289 Height=1.61925 AbsoluteFlag=0 SymType=0 cubic Bezier points (X Y): 0.5 0, 0.5 -0.276667, 0.271282 -0.230263, -0.0053842 -0.230263, -0.282051 -0.230263, -0.5 -0.276667, -0.5 0, -0.5 0.276667, -0.276667 0.5, 0 0.5, 0.276667 0.5, 0.5 0.276667, 0.5 0
    5  0.656797     0            0.008         edit curve Width=0.451895 Height=1.04198 AbsoluteFlag=0 SymType=0 cubic Bezier points (X Y): 0.5 0, 0.5 -0.276667, 0.26863 -0.253289, -0.00803709 -0.253289, -0.284704 -0.253289, -0.5 -0.276667, -0.5 0, -0.5 0.276667, -0.276667 0.5, 0 0.5, 0.276667 0.5, 0.5 0.276667, 0.5 0
    6  0.748316     0            0.008         edit curve Width=0.316327 Height=0.547677 AbsoluteFlag=0 SymType=0 cubic Bezier points (X Y): 0.5 0, 0.5 -0.276667, 0.262564 -0.25, -0.0141027 -0.25, -0.290769 -0.25, -0.5 -0.276667, -0.5 0, -0.5 0.276667, -0.276667 0.5, 0 0.5, 0.276667 0.5, 0.5 0.276667, 0.5 0
    7  0.830403     0            0.012         edit curve Width=0.256143 Height=0.357343 AbsoluteFlag=0 SymType=0 cubic Bezier points (X Y): 0.5 0, 0.5 -0.276667, 0.271592 -0.269737, -0.00507431 -0.269737, -0.281741 -0.269737, -0.5 -0.276667, -0.5 0, -0.5 0.276667, -0.276667 0.5, 0 0.5, 0.276667 0.5, 0.5 0.276667, 0.5 0
    8  0.91875      0            0.013648      edit curve Width=0.204082 Height=0.190338 AbsoluteFlag=0 SymType=0 cubic Bezier points (X Y): 0.5 0, 0.5 -0.276667, 0.270088 -0.253943, -0.00657895 -0.253943, -0.283246 -0.253943, -0.5 -0.276667, -0.5 0, -0.5 0.276667, -0.276667 0.5, 0 0.5, 0.276667 0.5, 0.5 0.276667, 0.5 0
    9  1            0            0.0164541     point

Wing "wing", child of "fuselage"
  location (X Y Z) 2.898 0 0, rotation 0 0 0
  symmetric about XZ
  bounding box size 1.89101 12.881 1.46666
  totals: TotalSpan=14.5151 TotalProjectedSpan=12.8271 TotalChord=0.888429 TotalArea=16.29 TotalAR=10.1003
  root: chord 1.89044, twist 0, airfoil file "WORTMANN_DA42"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 BaseThickChord=0.137237 ThickChord=0.15
  sections:
    n  Span      Root_Chord  Tip_Chord  Area       Sweep    Sweep_Location  Dihedral  Twist  Twist_Location  tip airfoil
    1  2.18576   1.89044     1.23955    3.42071    12.89    0               5         0      0.25            as above
    2  4.1888    1.23955     0.876083   4.43099    2.54     0               5         0      0.25            airfoil file "WORTMANN_DA42"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 BaseThickChord=0.137237 ThickChord=0.137237
    3  0.114572  0.876083    0.414831   0.0739515  75.9889  0               56.51     0      0.25            NACA 4-series Camber=0 CamberLoc=0.2 ThickChord=0.1
    4  0.768425  0.414831    0.156055   0.219341   28.52    0               90        0      0.25            as above
  SS_Control "flap_1": EtaStart=0.27451 EtaEnd=0.622549 Length_C_Start=0.25 Length_C_End=0.25 Length_Start=0.324293 Length_End=0.259291 LE_Flag=0 Surf_Type=2
  SS_Control "aileron": EtaStart=0.624549 EtaEnd=0.872549 Length_C_Start=0.25 Length_C_End=0.25 Length_Start=0.258976 Length_End=0.219932 LE_Flag=0 Surf_Type=2

Wing "canardWing", child of "wing"
  location (X Y Z) 0.329 0 0, rotation 0 0 0
  symmetric about XZ
  bounding box size 0.427 2.77192 0.0481114
  totals: TotalSpan=2.775 TotalProjectedSpan=2.77192 TotalChord=0.218 TotalArea=0.786324 TotalAR=9.77146
  root: chord 0.427, twist 0, NACA 4-series Camber=0 CamberLoc=0.2 ThickChord=0.1
  sections:
    n  Span    Root_Chord  Tip_Chord  Area      Sweep  Sweep_Location  Dihedral  Twist  Twist_Location  tip airfoil
    1  1.221   0.427       0.181      0.371184  6.39   0               0         0      0.25            as above
    2  0.1665  0.181       0.083      0.021978  25.13  0               -7.8      0      0.25            as above

Wing "horizontal"
  location (X Y Z) 7.42677 0 1.33721, rotation 0 0 -1.1
  symmetric about XZ
  bounding box size 0.838253 2.48865 0.227484
  totals: TotalSpan=2.69534 TotalProjectedSpan=2.51736 TotalChord=0.344851 TotalArea=1.2097 TotalAR=5.2386
  root: chord 0.70802, twist 0, NACA 4-series Camber=0 CamberLoc=0.2 ThickChord=0.12
  sections:
    n  Span      Root_Chord  Tip_Chord  Area       Sweep   Sweep_Location  Dihedral  Twist  Twist_Location  tip airfoil
    1  1.119     0.70802     0.296401   0.561974   15.814  0               0         0      0.25            NACA 4-series Camber=0 CamberLoc=0.2 ThickChord=0.1
    2  0.228672  0.296401    0.0785815  0.0428741  61.36   0               -52.35    0      0.25            as above
  SS_Control "elevator": EtaStart=0.828431 EtaEnd=0.0588235 Length_C_Start=0.25 Length_C_End=0.25 Length_Start=0.0743345 Length_End=0.169715 LE_Flag=0 Surf_Type=2

Wing "vertical"
  location (X Y Z) 4.3055 0 0, rotation 90 0 -3.93
  bounding box size 4.19592 0.486746 1.63802
  totals: TotalSpan=1.581 TotalProjectedSpan=1.581 TotalChord=2.33887 TotalArea=2.85608 TotalAR=0.875171
  root: chord 4.05438, twist 0, NACA 4-series Camber=0 CamberLoc=0.2 ThickChord=0.12
  sections:
    n  Span   Root_Chord  Tip_Chord  Area      Sweep  Sweep_Location  Dihedral  Twist  Twist_Location  tip airfoil
    1  0.222  4.05438     3.16275    0.801101  76.15  0               0         0      0.25            as above
    2  0.446  3.16275     1.36218    1.00906   76.15  0               0         0      0.25            as above
    3  0.913  1.36218     0.929      1.04592   26.68  0               0         0      0.25            as above
  SS_Control "rudder_1": EtaStart=0.00490196 EtaEnd=1 Length_C_Start=0.20098 Length_C_End=0.20098 Length_Start=0.808595 Length_End=0.186711 LE_Flag=0 Surf_Type=2

Stack "nacelle_1", child of "vertical"
  location (X Y Z) 2.484 1.677 0.163, rotation 0 0 -2.65
  bounding box size 2.73941 0.818021 0.829183
  cross sections:
    n  XDelta    YDelta  ZDelta  shape
    0  0         0       0       point
    1  0.276053  0       0       ellipse Ellipse_Height=0.764549 Ellipse_Width=0.71197
    2  0.341842  0       0       ellipse Ellipse_Height=0.829183 Ellipse_Width=0.800966
    3  0.867     0       0       ellipse Ellipse_Height=0.550101 Ellipse_Width=0.530612
    4  0.692     0       0       ellipse Ellipse_Height=0.242632 Ellipse_Width=0.654477
    5  0.264368  0       0       ellipse Ellipse_Height=0.188359 Ellipse_Width=0.523582
    6  0.286947  0       0       edit curve Width=0.343511 Height=0.0844368 AbsoluteFlag=0 SymType=0 cubic Bezier points (X Y): 0.5 0, 0.5 -0.275958, 0.275958 -0.5, 0 -0.5, -0.275958 -0.5, -0.5 -0.275958, -0.5 0, -0.5 0.275958, -0.275958 0.5, 0 0.5, 0.275958 0.5, 0.5 0.275958, 0.5 0

Custom "disk_0", child of "nacelle_1"
  location (X Y Z) 2.484 1.677 0.163, rotation 0 0 0
  bounding box size 0 1.87 1.87
  Design: Diameter=1.87
  custom script Disk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

Stack "nacelle_2", child of "disk_0"
  location (X Y Z) 2.484 -1.677 0.163, rotation 0 0 2.65
  bounding box size 2.73941 0.818021 0.829183
  cross sections:
    n  XDelta    YDelta  ZDelta  shape
    0  0         0       0       point
    1  0.276053  0       0       ellipse Ellipse_Height=0.764549 Ellipse_Width=0.71197
    2  0.341842  0       0       ellipse Ellipse_Height=0.829183 Ellipse_Width=0.800966
    3  0.867     0       0       ellipse Ellipse_Height=0.550101 Ellipse_Width=0.530612
    4  0.692     0       0       ellipse Ellipse_Height=0.242632 Ellipse_Width=0.654477
    5  0.264368  0       0       ellipse Ellipse_Height=0.188359 Ellipse_Width=0.523582
    6  0.286947  0       0       edit curve Width=0.343511 Height=0.0844368 AbsoluteFlag=0 SymType=0 cubic Bezier points (X Y): 0.5 0, 0.5 -0.275958, 0.275958 -0.5, 0 -0.5, -0.275958 -0.5, -0.5 -0.275958, -0.5 0, -0.5 0.275958, -0.275958 0.5, 0 0.5, 0.275958 0.5, 0.5 0.275958, 0.5 0

Custom "disk_1", child of "nacelle_2"
  location (X Y Z) 2.484 -1.677 0.163, rotation 0 0 0
  bounding box size 0 1.87 1.87
  Design: Diameter=1.87
  custom script Disk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

VSPAERO settings: Sref=16.29 bref=13.55 cref=1.271 Xcg=3.10559 Ycg=0 Zcg=0 AlphaStart=0 AlphaEnd=10 AlphaNpts=3 BetaStart=0 BetaEnd=0 BetaNpts=1 MachStart=0 MachEnd=0 MachNpts=1 ReCref=1e+07 Vinf=100 Rho=0.002377
  control group "FLAP": DeflectionAngle=0
  control group "AILERON": DeflectionAngle=0
  control group "ELEVATOR": DeflectionAngle=0
  control group "RUDDER": DeflectionAngle=0
