OpenVSP model (file version 5), 12 components.
Geometry view with OpenVSP parameter names; values to 6 digits, angles in degrees, lengths in the model's unit.
Overall bounding box: X_Min=-0.0542104 X_Len=39.3945 Y_Min=-18.1314 Y_Len=36.2629 Z_Min=-0.953802 Z_Len=8.98412

Stack "fuselage"
  location (X Y Z) 0 0 0, rotation 0 0 0
  bounding box size 36.9164 3.501 3.50284
  cross sections:
    n   XDelta     YDelta  ZDelta       shape
    0   0          0       0            ellipse Ellipse_Height=0.40566 Ellipse_Width=0.417191
    1   0.131447   0       0.0204028    file fuselage section Height=0.654972 Width=0.680373
    2   0.0261729  0       0.00845653   file fuselage section Height=0.695826 Width=0.729669
    3   0.0781896  0       0.0166468    file fuselage section Height=0.800639 Width=0.824643
    4   0.129223   0       0.0199072    file fuselage section Height=0.958654 Width=0.981605
    5   0.178631   0       0.0368419    file fuselage section Height=1.15844 Width=1.19858
    6   0.225793   0       0.0469743    file fuselage section Height=1.3872 Width=1.42475
    7   0.270116   0       0.0517566    file fuselage section Height=1.63506 Width=1.68106
    8   0.311041   0       0.0677052    file fuselage section Height=1.90425 Width=1.95705
    9   0.348055   0       0.0681685    file fuselage section Height=2.17625 Width=2.23508
    10  0.380693   0       0.0816228    file fuselage section Height=2.45746 Width=2.52555
    11  0.408542   0       0.0832286    file fuselage section Height=2.72948 Width=2.80028
    12  0.431254   0       0.0911629    file fuselage section Height=2.99903 Width=3.06175
    13  0.448543   0       0.0874702    file fuselage section Height=3.22697 Width=3.29738
    14  0.460191   0       0.0771297    file fuselage section Height=3.4141 Width=3.44792
    15  0.466052   0       0.0387448    file fuselage section Height=3.5 Width=3.5
    16  5.6255     0       2.33856e-09  as above
    17  11.251     0       0            as above
    18  5.6255     0       2.54625e-09  as above
    19  0.301302   0       0.0040391    file fuselage section Height=3.49177 Width=3.49042
    20  0.867566   0       0.0235544    file fuselage section Height=3.44386 Width=3.43835
    21  1.32919    0       0.077852     file fuselage section Height=3.28124 Width=3.25265
    22  1.63049    0       0.139927     file fuselage section Height=2.97423 Width=2.89734
    23  1.73513    0       0.182738     file fuselage section Height=2.54352 Width=2.40085
    24  1.63049    0       0.194576     file fuselage section Height=2.03228 Width=1.82624
    25  1.32919    0       0.174387     file fuselage section Height=1.49138 Width=1.25284
    26  0.867566   0       0.123038     file fuselage section Height=0.990681 Width=0.75808
    27  0.301302   0       0.0652834    file fuselage section Height=0.669487 Width=0.490336

Wing "wing"
  location (X Y Z) 15.064 0 2.7327, rotation 0 0 0
  symmetric about XZ
  bounding box size 3.74111 36.2629 0.818074
  totals: TotalSpan=36.0082 TotalProjectedSpan=35.9996 TotalChord=3.2515 TotalArea=110.03 TotalAR=11.7783
  root: chord 3.741, twist 2, airfoil file "FAME_FCRA_2500_4DLR_VC AIRFOIL ROOT PANEL 0 DoA5"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 BaseThickChord=0.163887 ThickChord=0.16
  sections:
    n  Span    Root_Chord  Tip_Chord  Area     Sweep  Sweep_Location  Dihedral  Twist  Twist_Location  tip airfoil
    1  5.4011  3.741       3.741      20.2055  0      0               0         0      0               airfoil file "FAME_FCRA_2500_4DLR_VC AIRFOIL TIP PANEL 0 NACA23018"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 BaseThickChord=0.163887 ThickChord=0.18
    2  12.603  3.741       1.783      34.8095  4      0               1.5       -3     0               airfoil file "FAME_FCRA_2500_4DLR_VC AIRFOIL TIP PANEL 1 NACA23015"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 BaseThickChord=0.150382 ThickChord=0.15
  SS_Control "flap_0": UStart=0.333315 UEnd=0.483283 Length_C_Start=0.35 Length_C_End=0.35 Length_Start=1.30913 Length_End=1.30925 LE_Flag=0 Surf_Type=2
  SS_Control "flap_1": UStart=0.507118 UEnd=0.610663 Length_C_Start=0.33 Length_C_End=0.3 Length_Start=1.21609 Length_End=0.862273 LE_Flag=0 Surf_Type=2
  SS_Control "aileron": UStart=0.642798 UEnd=0.728491 Length_C_Start=0.3 Length_C_End=0.3 Length_Start=0.786814 Length_End=0.585748 LE_Flag=0 Surf_Type=2

Wing "horizontal"
  location (X Y Z) 35.95 0 7.4077, rotation 0 0 0
  symmetric about XZ
  bounding box size 3.3903 11.866 0.35021
  totals: TotalSpan=11.64 TotalProjectedSpan=11.64 TotalChord=2.4285 TotalArea=28.2677 TotalAR=4.79308
  root: chord 2.918, twist 0, airfoil file "FAME_FCRA_2500_4DLR_VC AIRFOIL ROOT PANEL 0 NACA0012"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 BaseThickChord=0.120036 ThickChord=0.12
  sections:
    n  Span  Root_Chord  Tip_Chord  Area     Sweep  Sweep_Location  Dihedral  Twist  Twist_Location  tip airfoil
    1  5.82  2.918       1.939      14.1339  14     0               0         0      0               airfoil file "FAME_FCRA_2500_4DLR_VC AIRFOIL TIP PANEL 0 NACA0012"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 BaseThickChord=0.120036 ThickChord=0.12
  SS_Control "htail_elevator_0": UStart=0.343333 UEnd=0.65 Length_C_Start=0.33 Length_C_End=0.33 Length_Start=0.953248 Length_End=0.656024 LE_Flag=0 Surf_Type=2

Wing "vertical"
  location (X Y Z) 31.828 0 2.3627, rotation 90 0 0
  bounding box size 7.15619 0.567441 5.66762
  totals: TotalSpan=5.529 TotalProjectedSpan=5.529 TotalChord=3.7815 TotalArea=20.9079 TotalAR=1.46212
  root: chord 4.728, twist 0, airfoil file "FAME_FCRA_2500_4DLR_VC AIRFOIL ROOT PANEL 0 NACA0012"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 BaseThickChord=0.120036 ThickChord=0.12
  sections:
    n  Span   Root_Chord  Tip_Chord  Area     Sweep  Sweep_Location  Dihedral  Twist  Twist_Location  tip airfoil
    1  5.529  4.728       2.835      20.9079  38     0               0         0      0               airfoil file "FAME_FCRA_2500_4DLR_VC AIRFOIL TIP PANEL 0 NACA0012"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 BaseThickChord=0.120036 ThickChord=0.12
  SS_Control "vtail_rudder_0": UStart=0.366667 UEnd=0.6 Length_C_Start=0.35 Length_C_End=0.35 Length_Start=1.58855 Length_End=1.12476 LE_Flag=0 Surf_Type=2

Stack "Nacelle_0"
  location (X Y Z) 12.264 5.4 1.8827, rotation 0 0 0
  bounding box size 5.467 1.66272 1.66432
  cross sections:
    n   XDelta     YDelta  ZDelta       shape
    0   0          0       0            circle Circle_Diameter=0.991148
    1   0.0117053  0       0            circle Circle_Diameter=0.996532
    2   0.0350657  0       0            circle Circle_Diameter=1.01266
    3   0.0582759  0       0            circle Circle_Diameter=1.03943
    4   0.0812366  0       0            circle Circle_Diameter=1.07662
    5   0.103849   0       0            circle Circle_Diameter=1.12381
    6   0.126018   0       0            circle Circle_Diameter=1.18025
    7   0.147646   0       0            circle Circle_Diameter=1.24473
    8   0.168642   0       0            circle Circle_Diameter=1.31547
    9   0.188917   0       0            circle Circle_Diameter=1.38993
    10  0.208382   0       0            circle Circle_Diameter=1.46471
    11  0.226954   0       0            circle Circle_Diameter=1.5354
    12  0.244555   0       0            circle Circle_Diameter=1.59651
    13  0.261109   0       0            circle Circle_Diameter=1.64145
    14  0.141835   0       0            circle Circle_Diameter=1.6559
    15  0.141835   0       9.05265e-05  circle Circle_Diameter=1.66258
    16  0.141835   0       0.0018019    circle Circle_Diameter=1.66103
    17  0.141835   0       0.0018019    circle Circle_Diameter=1.65139
    18  0.303802   0       0.00462066   circle Circle_Diameter=1.60486
    19  0.315508   0       0.0047987    circle Circle_Diameter=1.52248
    20  0.325862   0       0.00495618   circle Circle_Diameter=1.40517
    21  0.334821   0       0.00509244   circle Circle_Diameter=1.25512
    22  0.342346   0       0.00520689   circle Circle_Diameter=1.07572
    23  0.348405   0       0.00529904   circle Circle_Diameter=0.871424
    24  0.352972   0       0.00536851   circle Circle_Diameter=0.647612
    25  0.356028   0       0.00541498   circle Circle_Diameter=0.410375
    26  0.357559   0       0.00543827   circle Circle_Diameter=0.1663

Custom "propeller_0"
  location (X Y Z) 12.264 5.4 1.8827, rotation 0 0 0
  bounding box size 0 3.967 3.967
  Design: Diameter=3.967
  custom script Disk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

Stack "Nacelle_1"
  location (X Y Z) 12.264 -5.4 1.8827, rotation 0 0 0
  bounding box size 5.467 1.66272 1.66432
  cross sections:
    n   XDelta     YDelta  ZDelta       shape
    0   0          0       0            circle Circle_Diameter=0.991148
    1   0.0117053  0       0            circle Circle_Diameter=0.996532
    2   0.0350657  0       0            circle Circle_Diameter=1.01266
    3   0.0582759  0       0            circle Circle_Diameter=1.03943
    4   0.0812366  0       0            circle Circle_Diameter=1.07662
    5   0.103849   0       0            circle Circle_Diameter=1.12381
    6   0.126018   0       0            circle Circle_Diameter=1.18025
    7   0.147646   0       0            circle Circle_Diameter=1.24473
    8   0.168642   0       0            circle Circle_Diameter=1.31547
    9   0.188917   0       0            circle Circle_Diameter=1.38993
    10  0.208382   0       0            circle Circle_Diameter=1.46471
    11  0.226954   0       0            circle Circle_Diameter=1.5354
    12  0.244555   0       0            circle Circle_Diameter=1.59651
    13  0.261109   0       0            circle Circle_Diameter=1.64145
    14  0.141835   0       0            circle Circle_Diameter=1.6559
    15  0.141835   0       9.05265e-05  circle Circle_Diameter=1.66258
    16  0.141835   0       0.0018019    circle Circle_Diameter=1.66103
    17  0.141835   0       0.0018019    circle Circle_Diameter=1.65139
    18  0.303802   0       0.00462066   circle Circle_Diameter=1.60486
    19  0.315508   0       0.0047987    circle Circle_Diameter=1.52248
    20  0.325862   0       0.00495618   circle Circle_Diameter=1.40517
    21  0.334821   0       0.00509244   circle Circle_Diameter=1.25512
    22  0.342346   0       0.00520689   circle Circle_Diameter=1.07572
    23  0.348405   0       0.00529904   circle Circle_Diameter=0.871424
    24  0.352972   0       0.00536851   circle Circle_Diameter=0.647612
    25  0.356028   0       0.00541498   circle Circle_Diameter=0.410375
    26  0.357559   0       0.00543827   circle Circle_Diameter=0.1663

Custom "propeller_1"
  location (X Y Z) 12.264 -5.4 1.8827, rotation 0 0 0
  bounding box size 0 3.967 3.967
  Design: Diameter=3.967
  custom script Disk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

Stack "Nacelle_2"
  location (X Y Z) 12.6905 11.5 2.04241, rotation 0 0 0
  bounding box size 5.467 1.66272 1.66522
  cross sections:
    n   XDelta     YDelta  ZDelta       shape
    0   0          0       0            circle Circle_Diameter=0.991148
    1   0.0117053  0       0            circle Circle_Diameter=0.996532
    2   0.0350657  0       0            circle Circle_Diameter=1.01266
    3   0.0582759  0       0            circle Circle_Diameter=1.03943
    4   0.0812366  0       0            circle Circle_Diameter=1.07662
    5   0.103849   0       0            circle Circle_Diameter=1.12381
    6   0.126018   0       0            circle Circle_Diameter=1.18025
    7   0.147646   0       0            circle Circle_Diameter=1.24473
    8   0.168642   0       0            circle Circle_Diameter=1.31547
    9   0.188917   0       0            circle Circle_Diameter=1.38993
    10  0.208382   0       0            circle Circle_Diameter=1.46471
    11  0.226954   0       0            circle Circle_Diameter=1.5354
    12  0.244555   0       0            circle Circle_Diameter=1.59651
    13  0.261109   0       0            circle Circle_Diameter=1.64145
    14  0.141835   0       0            circle Circle_Diameter=1.6559
    15  0.141835   0       0.000120702  circle Circle_Diameter=1.66258
    16  0.141835   0       0.00240254   circle Circle_Diameter=1.66103
    17  0.141835   0       0.00240254   circle Circle_Diameter=1.65139
    18  0.303802   0       0.00616089   circle Circle_Diameter=1.60486
    19  0.315508   0       0.00639826   circle Circle_Diameter=1.52248
    20  0.325862   0       0.00660824   circle Circle_Diameter=1.40517
    21  0.334821   0       0.00678991   circle Circle_Diameter=1.25512
    22  0.342346   0       0.00694252   circle Circle_Diameter=1.07572
    23  0.348405   0       0.00706539   circle Circle_Diameter=0.871424
    24  0.352972   0       0.00715801   circle Circle_Diameter=0.647612
    25  0.356028   0       0.00721998   circle Circle_Diameter=0.410375
    26  0.357559   0       0.00725103   circle Circle_Diameter=0.1663

Custom "propeller_2"
  location (X Y Z) 12.6905 11.5 2.04241, rotation 0 0 0
  bounding box size 0 3.967 3.967
  Design: Diameter=3.967
  custom script Disk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

Stack "Nacelle_3"
  location (X Y Z) 12.6905 -11.5 2.04241, rotation 0 0 0
  bounding box size 5.467 1.66272 1.66522
  cross sections:
    n   XDelta     YDelta  ZDelta       shape
    0   0          0       0            circle Circle_Diameter=0.991148
    1   0.0117053  0       0            circle Circle_Diameter=0.996532
    2   0.0350657  0       0            circle Circle_Diameter=1.01266
    3   0.0582759  0       0            circle Circle_Diameter=1.03943
    4   0.0812366  0       0            circle Circle_Diameter=1.07662
    5   0.103849   0       0            circle Circle_Diameter=1.12381
    6   0.126018   0       0            circle Circle_Diameter=1.18025
    7   0.147646   0       0            circle Circle_Diameter=1.24473
    8   0.168642   0       0            circle Circle_Diameter=1.31547
    9   0.188917   0       0            circle Circle_Diameter=1.38993
    10  0.208382   0       0            circle Circle_Diameter=1.46471
    11  0.226954   0       0            circle Circle_Diameter=1.5354
    12  0.244555   0       0            circle Circle_Diameter=1.59651
    13  0.261109   0       0            circle Circle_Diameter=1.64145
    14  0.141835   0       0            circle Circle_Diameter=1.6559
    15  0.141835   0       0.000120702  circle Circle_Diameter=1.66258
    16  0.141835   0       0.00240254   circle Circle_Diameter=1.66103
    17  0.141835   0       0.00240254   circle Circle_Diameter=1.65139
    18  0.303802   0       0.00616089   circle Circle_Diameter=1.60486
    19  0.315508   0       0.00639826   circle Circle_Diameter=1.52248
    20  0.325862   0       0.00660824   circle Circle_Diameter=1.40517
    21  0.334821   0       0.00678991   circle Circle_Diameter=1.25512
    22  0.342346   0       0.00694252   circle Circle_Diameter=1.07572
    23  0.348405   0       0.00706539   circle Circle_Diameter=0.871424
    24  0.352972   0       0.00715801   circle Circle_Diameter=0.647612
    25  0.356028   0       0.00721998   circle Circle_Diameter=0.410375
    26  0.357559   0       0.00725103   circle Circle_Diameter=0.1663

Custom "propeller_3"
  location (X Y Z) 12.6905 -11.5 2.04241, rotation 0 0 0
  bounding box size 0 3.967 3.967
  Design: Diameter=3.967
  custom script Disk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

VSPAERO settings: Sref=110 bref=36.0082 cref=2.87779 Xcg=15.9268 Ycg=0 Zcg=0 AlphaStart=0 AlphaEnd=10 AlphaNpts=3 BetaStart=0 BetaEnd=0 BetaNpts=1 MachStart=0 MachEnd=0 MachNpts=1 ReCref=1e+07 Vinf=100 Rho=0.002377
