OpenVSP model (file version 5), 8 components.
Geometry view with OpenVSP parameter names; values to 6 digits, angles in degrees, lengths in the model's unit.
Overall bounding box: X_Min=0 X_Len=1.14662 Y_Min=-0.967 Y_Len=1.934 Z_Min=-0.083898 Z_Len=0.471253

Fuselage "fuselage"
  location (X Y Z) 0 0 0, rotation 0 0 0
  bounding box size 1.14662 0.15001 0.151144
  Design: Length=1.136
  cross sections:
    n   XLocPercent  YLocPercent  ZLocPercent  shape
    0   0            0            0            point
    1   0.01584      0            0            general fuselage BotStr=0.83 BotTanAngle=90 CornerRad=0 Height=0.094 LowStr=0.83 MaxWidthLoc=0 TopStr=0.83 TopTanAngle=90 UpStr=0.83 Width=0.092
    2   0.0405       0            0            general fuselage BotStr=0.83 BotTanAngle=90 CornerRad=0 Height=0.14 LowStr=0.83 MaxWidthLoc=0 TopStr=0.83 TopTanAngle=90 UpStr=0.83 Width=0.14
    3   0.0669       0            0            general fuselage BotStr=0.83 BotTanAngle=90 CornerRad=0 Height=0.15 LowStr=0.83 MaxWidthLoc=0 TopStr=0.83 TopTanAngle=90 UpStr=0.83 Width=0.15
    4   0.13         0            0            as above
    5   0.18         0            0            as above
    6   0.22         0            0            as above
    7   0.277        0            0            as above
    8   0.296849     0            0            general fuselage BotStr=0.83 BotTanAngle=95 CornerRad=0 Height=0.085 LowStr=0.83 MaxWidthLoc=0 TopStr=0.83 TopTanAngle=95 UpStr=0.83 Width=0.115
    9   0.65         0            0            general fuselage BotStr=0.83 BotTanAngle=90 CornerRad=0 Height=0.085 LowStr=0.83 MaxWidthLoc=0 TopStr=0.83 TopTanAngle=90 UpStr=0.83 Width=0.115
    10  0.875        0            0            as above
    11  0.99         0            0            as above
    12  1            0            0            point

Wing "wing_2", child of "fuselage"
  location (X Y Z) 0.338 -0.037 0.075, rotation 180 -3.5 0
  bounding box size 0.149693 0.93 0.0203674
  totals: TotalSpan=0.93 TotalProjectedSpan=0.93 TotalChord=0.15 TotalArea=0.1395 TotalAR=6.2
  root: chord 0.15, twist 0, airfoil file "L100_closed"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 BaseThickChord=0.130051 Invert=1 ThickChord=0.130051
  sections:
    n  Span  Root_Chord  Tip_Chord  Area    Sweep  Sweep_Location  Dihedral  Twist  Twist_Location  tip airfoil
    1  0.93  0.15        0.15       0.1395  0      0               0         0      0.25            as above

Wing "horizontal_1", child of "wing_2"
  location (X Y Z) 0.96 0.037 -0.075, rotation 0 2 0
  bounding box size 0.149904 0.69 0.0197145
  totals: TotalSpan=0.69 TotalProjectedSpan=0.69 TotalChord=0.15 TotalArea=0.1035 TotalAR=4.6
  root: chord 0.15, twist 0, airfoil file "L100_closed"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 BaseThickChord=0.130051 ThickChord=0.130051
  sections:
    n  Span  Root_Chord  Tip_Chord  Area    Sweep  Sweep_Location  Dihedral  Twist  Twist_Location  tip airfoil
    1  0.69  0.15        0.15       0.1035  0      0               0         0      0.25            as above
  SS_Control "elevator": EtaStart=0.1115 EtaEnd=0.7099 Length_C_Start=0.4145 Length_C_End=0.4145 Length_Start=0.0621874 Length_End=0.0621874 LE_Flag=0 Surf_Type=2

Wing "vertical_1"
  location (X Y Z) 0.974 0.0735 0.022, rotation 90 0 0
  symmetric about XZ
  bounding box size 0.0733412 0.156178 0.294291
  totals: TotalSpan=0.588582 TotalProjectedSpan=0.588582 TotalChord=0.0632315 TotalArea=0.0372868 TotalAR=9.29092
  root: chord 0.068389, twist 0, airfoil file "NACA 00135"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 BaseThickChord=0.134193 ThickChord=0.134193
  sections:
    n  Span      Root_Chord  Tip_Chord  Area         Sweep  Sweep_Location  Dihedral  Twist  Twist_Location  tip airfoil
    1  0.01062   0.068389    0.073      0.000750776  -25    0               0         0      0.25            NACA 4-series Camber=0 CamberLoc=0.2 ThickChord=0.1
    2  0.243257  0.073       0.056      0.0156901    2.08   0               0         0      0.25            as above
    3  0.040414  0.056       0.053      0.00220256   2.08   0               0         0      0.25            as above

Wing "wing_1", child of "vertical_1"
  location (X Y Z) 0.338 0.037 0.055, rotation 0 3.5 0
  bounding box size 0.149693 0.93 0.0203674
  totals: TotalSpan=0.93 TotalProjectedSpan=0.93 TotalChord=0.15 TotalArea=0.1395 TotalAR=6.2
  root: chord 0.15, twist 0, airfoil file "L100_closed"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 BaseThickChord=0.130051 ThickChord=0.130051
  sections:
    n  Span  Root_Chord  Tip_Chord  Area    Sweep  Sweep_Location  Dihedral  Twist  Twist_Location  tip airfoil
    1  0.93  0.15        0.15       0.1395  0      0               0         0      0.25            as above

Wing "vertical_2", child of "vertical_1"
  location (X Y Z) 0.97935 0.0735 0.316291, rotation 90 0 0
  symmetric about XZ
  bounding box size 0.028581 0.150489 0.071064
  totals: TotalSpan=0.142128 TotalProjectedSpan=0.142128 TotalChord=0.026 TotalArea=0.00369533 TotalAR=5.46646
  root: chord 0.026, twist 0, airfoil file "NACA 00135"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 BaseThickChord=0.134193 ThickChord=0.134193
  sections:
    n  Span      Root_Chord  Tip_Chord  Area        Sweep  Sweep_Location  Dihedral  Twist  Twist_Location  tip airfoil
    1  0.071064  0.026       0.026      0.00184766  2.08   0               0         0      0.25            NACA 4-series Camber=0 CamberLoc=0.2 ThickChord=0.1

Wing "horizontal_2"
  location (X Y Z) 0.96 -0.037 -0.055, rotation 180 -2 0
  bounding box size 0.149904 0.69 0.0197145
  totals: TotalSpan=0.69 TotalProjectedSpan=0.69 TotalChord=0.15 TotalArea=0.1035 TotalAR=4.6
  root: chord 0.15, twist 0, airfoil file "L100_closed"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 BaseThickChord=0.130051 Invert=1 ThickChord=0.130051
  sections:
    n  Span  Root_Chord  Tip_Chord  Area    Sweep  Sweep_Location  Dihedral  Twist  Twist_Location  tip airfoil
    1  0.69  0.15        0.15       0.1035  0      0               0         0      0.25            as above
  SS_Control "elevator": EtaStart=0.1115 EtaEnd=0.7099 Length_C_Start=0.4145 Length_C_End=0.4145 Length_Start=0.0621874 Length_End=0.0621874 LE_Flag=0 Surf_Type=2

Mesh "MeshGeom"
  location (X Y Z) 0 0 0, rotation 0 0 0
  triangle mesh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

VSPAERO settings: Sref=0.279 bref=1.86 cref=0.15 Xcg=0.56241 Ycg=-3.14325e-05 Zcg=0 AlphaStart=0 AlphaEnd=10 AlphaNpts=1 BetaStart=-2 BetaEnd=10 BetaNpts=7 MachStart=0.07 MachEnd=0 MachNpts=1 ReCref=200000 Vinf=22.2 Rho=1.125
  control group "ELEVATOR": DeflectionAngle=0
