OpenVSP model (file version 5), 8 components.
Geometry view with OpenVSP parameter names; values to 6 digits, angles in degrees, lengths in the model's unit.
Overall bounding box: X_Min=0 X_Len=12.0082 Y_Min=-6.99533 Y_Len=13.9907 Z_Min=-0.979133 Z_Len=4.01976

Wing "wing"
  location (X Y Z) 4.568 0 0.773, rotation 0 0 0
  symmetric about XZ
  bounding box size 2.00591 13.9907 0.478623
  totals: TotalSpan=14 TotalProjectedSpan=13.9907 TotalChord=1.8192 TotalArea=25.7727 TotalAR=7.59481
  root: chord 2.0038, twist 0, NACA 5-digit CamberLoc=0.15 IdealCl=0.3 ThickChord=0.15
  sections:
    n  Span   Root_Chord  Tip_Chord  Area     Sweep  Sweep_Location  Dihedral  Twist   Twist_Location  tip airfoil
    1  2.882  2.0038      2.0038     5.77495  0      0               0         3       0               as above
    2  2.059  2.0038      1.7269     3.84076  0      0               2.73      -0.106  0               as above
    3  2.059  1.7269      1.45       3.27062  0      0               2.73      -1.4    0               NACA 5-digit CamberLoc=0.15 IdealCl=0.3 ThickChord=0.12
  SS_Control "flap_1": EtaStart=0.12 EtaEnd=0.408953 Length_C_Start=0.265 Length_C_End=0.265 Length_Start=0.530857 Length_End=0.531002 LE_Flag=0 Surf_Type=2
  SS_Control "flap_2": EtaStart=0.414953 EtaEnd=0.752426 Length_C_Start=0.265 Length_C_End=0.265 Length_Start=0.530192 Length_End=0.445998 LE_Flag=0 Surf_Type=2
  SS_Control "aileron": EtaStart=0.754426 EtaEnd=1 Length_C_Start=0.210784 Length_C_End=0.210784 Length_Start=0.354355 Length_End=0.305637 LE_Flag=0 Surf_Type=2

Wing "horizontal"
  location (X Y Z) 10.7 0 0.2, rotation 0 0 0
  symmetric about XZ
  bounding box size 1.30816 5.244 0.15583
  totals: TotalSpan=5.244 TotalProjectedSpan=5.244 TotalChord=0.998 TotalArea=5.23351 TotalAR=5.25451
  root: chord 1.298, twist 0, NACA 4-series Camber=0 CamberLoc=0.2 ThickChord=0.12
  sections:
    n  Span   Root_Chord  Tip_Chord  Area     Sweep  Sweep_Location  Dihedral  Twist  Twist_Location  tip airfoil
    1  2.622  1.298       0.698      2.61676  13.1   0               0         0      0.25            as above
  SS_Control "elevator": EtaStart=0.00441176 EtaEnd=1 Length_C_Start=0.22549 Length_C_End=0.436275 Length_Start=0.292089 Length_End=0.30452 LE_Flag=0 Surf_Type=2

Wing "vertical"
  location (X Y Z) 8.24 0 0.738, rotation 90 0 -3.77
  bounding box size 3.65204 0.323892 2.51547
  totals: TotalSpan=2.4817 TotalProjectedSpan=2.4817 TotalChord=2.01632 TotalArea=3.96891 TotalAR=1.55177
  root: chord 3.23704, twist 0, NACA 4-series Camber=0 CamberLoc=0.2 ThickChord=0.1
  sections:
    n  Span    Root_Chord  Tip_Chord  Area      Sweep    Sweep_Location  Dihedral  Twist  Twist_Location  tip airfoil
    1  0.372   3.23704     1.98682    0.971637  73.7857  0               0         0      0               as above
    2  2.1097  1.98682     0.854603   2.99728   32.8571  0               0         0      0               as above
  SS_Control "rudder_1": EtaStart=0.0626878 EtaEnd=1 Length_C_Start=0.25 Length_C_End=0.348039 Length_Start=0.678547 Length_End=0.297435 LE_Flag=0 Surf_Type=2

Custom "TransportFuse"
  location (X Y Z) 0 0 0, rotation 0 0 0
  bounding box size 11.7 1.546 1.75213
  Design: AftCenter=0.136364 AftHeight=0.3295 AftMult=2.665 AftWidth=0.411 Diameter=1.546 Length=11.7 NoseCenter=-0.3 NoseMult=1.902
  custom script TransportFuse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

Stack "nacelle_1", child of "TransportFuse"
  location (X Y Z) 3.44262 -2.29508 0.819672, rotation 0 0 0
  bounding box size 2.55263 1.02514 0.778556
  cross sections:
    n  XDelta    YDelta  ZDelta      shape
    0  0         0       0           point
    1  0.210526  0       0           ellipse Ellipse_Height=0.563389 Ellipse_Width=0.809976
    2  1         0       0           ellipse Ellipse_Height=0.571642 Ellipse_Width=0.773247
    3  0.618421  0       -0.0493421  ellipse Ellipse_Height=0.305155 Ellipse_Width=0.680431
    4  0.486842  0       -0.0986842  ellipse Ellipse_Height=0.219057 Ellipse_Width=0.73377
    5  0.236842  0       0           point

Custom "disk_0", child of "nacelle_1"
  location (X Y Z) 3.443 -2.295 0.82, rotation 0 0 0
  bounding box size 0 1.95 1.95
  Design: Diameter=1.95
  custom script Disk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

Stack "nacelle_2", child of "nacelle_1"
  location (X Y Z) 3.44262 2.295 0.819672, rotation 0 0 0
  bounding box size 2.55263 1.02514 0.778556
  cross sections:
    n  XDelta    YDelta  ZDelta      shape
    0  0         0       0           point
    1  0.210526  0       0           ellipse Ellipse_Height=0.563389 Ellipse_Width=0.809976
    2  1         0       0           ellipse Ellipse_Height=0.571642 Ellipse_Width=0.773247
    3  0.618421  0       -0.0493421  ellipse Ellipse_Height=0.305155 Ellipse_Width=0.680431
    4  0.486842  0       -0.0986842  ellipse Ellipse_Height=0.219057 Ellipse_Width=0.73377
    5  0.236842  0       0           point

Custom "disk_1", child of "nacelle_2"
  location (X Y Z) 3.443 2.295 0.82, rotation 0 0 0
  bounding box size 0 1.95 1.95
  Design: Diameter=1.95
  custom script Disk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

VSPAERO settings: Sref=25.7565 bref=14 cref=1.8592 Xcg=5.0328 Ycg=0 Zcg=0.3865 AlphaStart=0 AlphaEnd=4 AlphaNpts=5 BetaStart=0 BetaEnd=0 BetaNpts=1 MachStart=0.2 MachEnd=0 MachNpts=1 ReCref=8.66266e+06 Vinf=100 Rho=0.002377
  control group "FLAP": DeflectionAngle=0
  control group "AILERON": DeflectionAngle=0
  control group "ELEVATOR": DeflectionAngle=0
  control group "RUDDER": DeflectionAngle=0
