OpenVSP model (file version 5), 5 components.
Geometry view with OpenVSP parameter names; values to 6 digits, angles in degrees, lengths in the model's unit.
Overall bounding box: X_Min=0 X_Len=6.23012 Y_Min=-6.01661 Y_Len=12.0332 Z_Min=-0.571 Z_Len=1.95919

Wing "wing"
  location (X Y Z) 2.68 0 -0.353803, rotation 0 0 0
  symmetric about XZ
  bounding box size 0.979584 12.0332 0.613162
  totals: TotalSpan=12.0792 TotalProjectedSpan=12.0332 TotalChord=0.852025 TotalArea=10.2918 TotalAR=14.0693
  root: chord 0.979728, twist 0, airfoil file "E216"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 BaseThickChord=0.104054 ThickChord=0.104
  sections:
    n  Span     Root_Chord  Tip_Chord  Area     Sweep  Sweep_Location  Dihedral  Twist  Twist_Location  tip airfoil
    1  3.01979  0.979728    0.870992   2.7944   1.81   0               5         0      0               as above
    2  3.01979  0.870992    0.686388   2.35148  1.81   0               5         0      0               as above

Wing "horizontal"
  location (X Y Z) 5.00728 0 0, rotation 0 0 0
  symmetric about XZ
  bounding box size 0.978814 3.87306 1.44695
  totals: TotalSpan=4.72813 TotalProjectedSpan=3.87306 TotalChord=0.757765 TotalArea=3.58281 TotalAR=4.18682
  root: chord 0.978814, twist 0, NACA 4-series Camber=0 CamberLoc=0.2 ThickChord=0.12
  sections:
    n  Span     Root_Chord  Tip_Chord  Area     Sweep  Sweep_Location  Dihedral  Twist  Twist_Location  tip airfoil
    1  2.36407  0.978814    0.536716   1.79141  5      0               35        0      0.25            as above

Fuselage "fuselage"
  location (X Y Z) 0.1 0 0, rotation 0 0 0
  bounding box size 6.13313 0.708995 0.901207
  Design: Length=6.12
  cross sections:
    n  XLocPercent  YLocPercent  ZLocPercent  shape
    0  0            0            0            point
    1  0.024168     0            -0.008       general fuselage BotStr=1.30971 BotTanAngle=53.8235 CornerRad=0 Height=0.408657 LowStr=0.601029 MaxWidthLoc=0.0980392 TopStr=0.784575 TopTanAngle=52.0588 UpStr=0.977794 Width=0.405413
    2  0.13         0            0.012        general fuselage BotStr=1.30971 BotTanAngle=53.8235 CornerRad=0 Height=0.889016 LowStr=0.601029 MaxWidthLoc=-0.411765 TopStr=1.37667 TopTanAngle=75.8824 UpStr=0.977794 Width=0.686089
    3  0.28553      0            0            general fuselage BotStr=1.30971 BotTanAngle=53.8235 CornerRad=0 Height=0.716946 LowStr=0.60103 MaxWidthLoc=-0.27451 TopStr=1.32765 TopTanAngle=76.7647 UpStr=0.97779 Width=0.586235
    4  0.68         0            -0.008       general fuselage BotStr=0.83 BotTanAngle=53.8235 CornerRad=0 Height=0.60987 LowStr=0.83 MaxWidthLoc=-0.27451 TopStr=0.83 TopTanAngle=90 UpStr=0.83 Width=0.586235
    5  0.94         0            -0.008       as above
    6  0.9915       0            0.003        general fuselage BotStr=0.83 BotTanAngle=90 CornerRad=0 Height=0.447727 LowStr=0.83 MaxWidthLoc=-0.325 TopStr=0.83 TopTanAngle=90 UpStr=0.83 Width=0.346416
    7  1            0            0.003        point

Mesh "MeshGeom"
  location (X Y Z) 0 0 0, rotation 0 0 0

Pod "PodGeom"
  location (X Y Z) 0.87 0 -0.571, rotation 0 -90 0
  bounding box size 0.426214 0.426214 0.465
  Design: FineRatio=2.182 Length=0.465

VSPAERO settings: Sref=30.53 bref=20.5 cref=1.14 Xcg=4.75043 Ycg=-2.34056e-09 Zcg=0.0467075 AlphaStart=2 AlphaEnd=10 AlphaNpts=2 BetaStart=0 BetaEnd=0 BetaNpts=1 MachStart=0.1 MachEnd=0 MachNpts=1 ReCref=1e+07 Vinf=100 Rho=0.002377
